// COMSOL Multiphysics 5.5.0.292 model "concentric_triangle_rounded_bottom.mph"
// Outline of the model tree

Parameters
  lda0 = 514[nm]
  t_gold = 40[nm]
  l_structure = 16[um]
  gap = 1
  R = 20[um]
  k0 = 1/lda0*2*pi [rad]
  f0 = c_const/lda0
  n_air = 1
  n_glass = 1.45
  n_poly = 1.58
  mesh_res = 6
  xl = 8[um]
  yl = 9[um]
  zl = 1.5[um]
  lda_min = 514[nm]
  lda_max = 830[nm]

Selections
  box5: Box "Air Physical" | entitydim = 3; xmin = -xl/2; xmax = 0; ymin = -yl/2; ymax = 0; zmin = zl*1.01; zmax = zl*1.02
  box6: Box "Substrate Physical"
    entitydim = 3
    xmin = -xl/2
    xmax = 0
    ymin = -yl/2
    ymax = 0
    zmin = -1e-1
    zmax = -1e-3
  box3: Box "Air all" | entitydim = 3; zmin = zl*1.01
  box4: Box "Substrate all" | entitydim = 3; zmax = -1e-3
  box2: Box "Structure"
    entitydim = 3
    xmin = -xl
    xmax = xl
    ymin = -yl
    ymax = yl/2
    zmin = -1e-3
    zmax = zl*1.01
    condition = inside
  uni1: Union "Physical" | entitydim = 3; input = {box5, box6, box2}
  uni2: Union "Gold" | entitydim = 3; input = {box4, box2}

Coordinate systems
  pml1: PML "Perfectly Matched Layer 1" on no domains

Geometry
  geom1 "Geometry 1" (3D, length unit µm)
    imp1: Import
      type = cad
      filename = C:\Users\zoltan\OneDrive - University of Birmingham\Raman\SERS\COMSOL\3D_ideal_shapes\rounded_bottom\400nm_edge_rounding\concentric_triangle_rounded_bottom.dwg
      knit = surface
    sca1: Scale | input = selection imp1; isotropic = 1e-3; factor = 1e-3
    mov1: Move | input = selection imp1; displx = -3/4; displz = 0
    blk1: Block
      contributeto = csel2
      pos = {0, 0, (zl+lda_max*2)/2-lda_max}
      base = center
      size = {xl+lda_max*2, yl+lda_max*2, zl+lda_max*2}
      layerleft = on
      layerright = on
      layerfront = on
      layerback = on
      layertop = on
    uni2: Union | input = blk1, mov1
    del1: Delete "Delete Entities 1" | input = uni2(1) domains 1
    wp1: WorkPlane | unite = on
    pard1: PartitionDomains | domain = selection csel2.dom; workplane = wp1
    uni1: Union | input = pard1
    blk2: Block | pos = {0, -R/2, 0}; base = center; size = {R, R, R}
    int1: Intersection | input = blk2, uni1
    fin: Finalize "Form Union"
    ige1: IgnoreEdges | input = fin(1) edges 1-4, 7, 8, 15, 17-35, 37-89, 91, 92, 94-96, 98

Materials
  mat6: Common "Air" on all domains
    RefractiveIndex
      n = n_air
      ki = 0
  mat3: Common "Au (Gold) (Johnson and Christy 1972: n,k 0.188-1.937 µm)" on selection uni2
    RefractiveIndex
      n = n_interp(c_const/freq)
      ki = k_interp(c_const/freq)
      int1: Interpolation "Refractive index"
        funcname = n_interp
        table = 
          {1.879E-7, 1.28}
          {1.916E-7, 1.32}
          {1.953e-07, 1.34}
          {1.993E-7, 1.33}
          {2.033E-7, 1.33}
          {2.073E-7, 1.3}
          {2.119e-07, 1.3}
          {2.164E-7, 1.3}
          {2.214E-7, 1.3}
          {2.262E-7, 1.31}
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        interp = piecewisecubic
        argunit = m
        fununit = 1
      int2: Interpolation "Refractive index, imaginary part"
        funcname = k_interp
        table = 
          {1.879E-7, 1.188}
          {1.916E-7, 1.203}
          {1.953e-07, 1.226}
          {1.993E-7, 1.251}
          {2.033E-7, 1.277}
          {2.073E-7, 1.304}
          {2.119e-07, 1.35}
          {2.164E-7, 1.387}
          {2.214E-7, 1.427}
          {2.262E-7, 1.46}
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        interp = piecewisecubic
        argunit = m
        fununit = 1

Physics
  ewfdx: ElectromagneticWavesFrequencyDomain "x polarised" on all domains
    dependent variable E = {Ex, Ey, Ez}
    BackgroundField.SolveFor = scatteredField
    BackgroundField.WaveType = LinearPolByAngle
    BackgroundField.kUserDefined = k0
    BackgroundField.anglePitch = pi/2
    wee1: WaveEquationElectric (default)
    pec1: PerfectElectricConductor (default)
    init1: init "Initial Values 1" (default)
    trans1: TransitionBoundaryCondition (disabled) on no boundaries | d = t_gold
    sctr1: Scattering "Scattering Boundary Condition 1" on boundaries 1, 2
    pmc1: PerfectMagneticConductor on boundaries 4, 5, 8, 12, 13
  ewfdy: ElectromagneticWavesFrequencyDomain "y polarised" on all domains
    dependent variable E2 = {E2x, E2y, E2z}
    BackgroundField.SolveFor = scatteredField
    BackgroundField.WaveType = LinearPolByAngle
    BackgroundField.kUserDefined = k0
    BackgroundField.angleRoll = pi/2
    BackgroundField.anglePitch = pi/2
    wee1: WaveEquationElectric (default)
    pec1: PerfectElectricConductor (default)
    init1: init "Initial Values 1" (default)
    trans2: TransitionBoundaryCondition (disabled) on no boundaries | d = t_gold
    sctr1: Scattering "Scattering Boundary Condition 1" on boundaries 1, 2
    pmc1: PerfectMagneticConductor (disabled) on no boundaries

Mesh
  mesh1 "Mesh 1"
    size: MeshSizeDefault | hauto = 9
    ftet1: FreeTet "Free Tetrahedral 1" on selection uni1
      size1: Size "Air" on selection box5 | hmax = lda_min/mesh_res; hmin = lda_min/mesh_res/2; hauto = 9; custom = on
      size2: Size "Structure" on selection box2
        hmax = lda_min/mesh_res
        hmin = lda_min/mesh_res/2
        hauto = 9
        custom = on
      size3: Size "Substrate" on selection box6 | hmax = lda_min/mesh_res; hmin = lda_min/mesh_res/2; custom = on

Studies
  std3 "Study Simple"
    freq: Frequency "Frequency Domain" | punit = Hz; plist = f0; solve for = {ewfdx}
  std5 "Study Parametric steps"
    param: Parametric "Parametric Sweep" | pname = lda0; plistarr = 514[nm], 633[nm], 785[nm], 830[nm]; punit = m
    freq: Frequency "Frequency Domain" | punit = Hz; plist = f0; solve for = {ewfdx}
    freq2: Frequency "Frequency Domain 2" | punit = Hz; plist = f0; solve for = {ewfdy}
  std6 "Study combined frequencies"
    freq: Frequency "Frequency Domain x"
      punit = THz
      plist = 583.2538093589549, 473.6057788475559, 381.901220396, 361.195732543
      solve for = {ewfdx}
    freq1: Frequency "Frequency Domain y"
      punit = THz
      plist = 583.2538093589549, 473.6057788475559, 381.901220396, 361.195732543
      solve for = {ewfdy}

Solver configurations
  sol8 "Solution 8" (study std3)
    v1: Variables "Dependent Variables 1"
    s1: Stationary "Stationary Solver 1"
      p1: Parametric | pname = freq; plistarr = f0; punit = Hz; pcontinuationmode = no
      se1: Segregated
        ss1: SegregatedStep "x polarised" | linsolver = i1
        ss2: SegregatedStep "y polarised" | segvar = {comp1_E2}; linsolver = i2
      i1: Iterative "Suggested Iterative Solver (ewfdx)" | linsolver = bicgstab
        mg1: Multigrid
      i2: Iterative "Suggested Iterative Solver (ewfdy)" | linsolver = bicgstab
        mg1: Multigrid
  sol11 "Solution 11" (study std5)
    v1: Variables "Dependent Variables 1"
    s1: Stationary "Stationary Solver 1"
      p1: Parametric | pname = freq; plistarr = f0; punit = Hz; pcontinuationmode = no
      fc1: FullyCoupled
      i1: Iterative "Suggested Iterative Solver (ewfdx)" | linsolver = bicgstab
        mg1: Multigrid
    v2: Variables "Dependent Variables 2" | initmethod = sol; notsolmethod = sol
    s2: Stationary "Stationary Solver 2"
      p1: Parametric | pname = freq; plistarr = f0; punit = Hz; pcontinuationmode = no
      fc1: FullyCoupled
      i1: Iterative "Suggested Iterative Solver (ewfdy)" | linsolver = bicgstab
        mg1: Multigrid
  sol12 "Parametric Solutions 2" (study std5)
  sol17 "Solution 17" (study std6)
    v1: Variables "Dependent Variables 1"
    s1: Stationary "Stationary Solver 1"
      p1: Parametric
        pname = freq
        plistarr = 583.2538093589549, 473.6057788475559, 381.901220396, 361.195732543
        punit = THz
        pcontinuationmode = no
      fc1: FullyCoupled | linsolver = i1
      i1: Iterative "Suggested Iterative Solver (ewfdx)" | linsolver = bicgstab
        mg1: Multigrid
    su1: StoreSolution "Solution Store 1"
    v2: Variables "Dependent Variables 2" | initmethod = sol; notsolmethod = sol
    s2: Stationary "Stationary Solver 2"
      p1: Parametric
        pname = freq
        plistarr = 583.2538093589549, 473.6057788475559, 381.901220396, 361.195732543
        punit = THz
        pcontinuationmode = no
      fc1: FullyCoupled | linsolver = i1
      i1: Iterative "Suggested Iterative Solver (ewfdy)" | linsolver = bicgstab
        mg1: Multigrid
  sol18 "Solution Store 1" (study std6)

Datasets
  dset4: Solution | solution = sol8
  mir1: Mirror3D | data = dset10; quickplane = xz; removesymelem = on
  dset7: Solution | solution = sol11
  dset8: Solution | solution = sol12
  dset9: Solution | solution = sol17
  dset10: Solution | solution = sol18

Derived values
  max1: MaxSurface "Field Surface Maximum 1" on boundaries 6, 9, 10
    data = dset9
    table = tbl1
    expr = {up(ewfdx.normE), up(ewfdy.normE), }
    unit = {V/m, V/m, }
    descr = {Evaluate in domain on upside, Evaluate in domain on upside, }
  max2: MaxSurface "Intensity Surface Maximum 1.1"
    data = dset8
    expr = {ewfdx.normE^2, ewfdy.normE^2, (ewfdx.normE^2+ewfdy.normE^2)/2}
    unit = {kg^2*m^2/(s^6*A^2), kg^2*m^2/(s^6*A^2), kg^2*m^2/(s^6*A^2)}
  av1: AvSurface "Surface Average 1" | data = dset8; expr = {up(ewfdx.normE), up(ewfdy.normE)}; unit = {V/m, V/m}
  int1: IntSurface "Surface Integration 1"
    data = dset8
    expr = {ewfdx.normE, ewfdy.normE, (ewfdx.normE+ewfdy.normE)/2, 1}
    unit = {V*m, V*m, V*m, m^2}

Tables
  tbl1: Table
    // Field Surface Maximum 1
    freq (THz) | Evaluate in domain on upside (V/m) | Evaluate in domain on upside (V/m)
    583.254 | 3.21679 | 3.12561
    473.606 | 7.36543 | 8.25955
    381.901 | 7.26217 | 6.34682
    361.196 | 15.3186 | 13.7564

Plots
  pg1: PlotGroup3D "Electric Field (ewfdx)" | data = dset8
    mslc1: Multislice | expr = ewfdx.normE
  pg2: PlotGroup3D "Electric Field (ewfdy)" | data = dset8
    mslc1: Multislice | expr = ewfdy.normE
  pg3: PlotGroup3D "3D Plot Group 3" | data = mir1
    surf1: Surface | expr = up(ewfdx.normE)
      filt1: Filter | expr = (dom==6)||(dom==3)||(dom==10)||(dom==9)
    slc1: Slice (disabled) | expr = ewfdx.normE; quickplane = zx; quickynumber = 1
  pg4: PlotGroup3D "3D Plot Group 4" | data = dset9
    surf1: Surface | expr = up(ewfdy.normE)
      filt1: Filter | expr = (dom==6)||(dom==10)||(dom==13)||(dom==14)
    slc1: Slice (disabled) | expr = ewfdx.normE; quickplane = zx; quickynumber = 1

Exports
  img1: Image
    sourceobject = pg3
    size = current
    unit = px
    width = 800
    height = 600
    pngfilename = C:\Users\sztranyz\OneDrive - University of Birmingham\Raman\SERS\COMSOL\3D_symmetry_afm_models\triangle_830nm_2.png
  plot1: Plot
    filename = C:\Users\sztranyz\OneDrive - University of Birmingham\Raman\SERS\COMSOL\3D_symmetry_afm_models\triangle_830nm_field.csv