// COMSOL Multiphysics 5.5.0.292 model "standalone.mph"
// Outline of the model tree

Parameters
  R = 3[um]
  lda0 = 830[nm]
  k0 = 2*pi/lda0
  E0 = 1[V/m]
  height = 1.5[um]
  wall_width = 0.8[um]
  domain_width = 160[um]
  domain_height = 6[um]
  center_width = 2[um]
  gap_width = 0.4[um]
  rounding = 0.2[um]
  rounding_top = 0.4[um]

Selections
  sel1: Explicit "top_bottom" on boundaries 1, 2, 8, 10, 14, 21
  sel2: Explicit "sides" on boundaries 22-25

Coordinate systems
  pml1: PML "Perfectly Matched Layer 1" on no domains

Geometry
  geom1 "Geometry 1" (2D, length unit µm)
    r1: Rectangle
      base = center
      layername = Layer 1
      layer = lda0
      layerleft = on
      layerright = on
      layertop = on
      size = {domain_width, domain_height}
    r2: Rectangle "center" | base = center; size = {center_width, height}
    ls1: LineSegment
      specify1 = coord
      coord1 = {-domain_width/2, -height/2}
      specify2 = coord
      coord2 = {domain_width/2, -height/2}
    ls2: LineSegment | specify1 = coord; coord1 = {0, -domain_height/2}; specify2 = coord; coord2 = {0, domain_height/2}
    uni1: Union | input = ls1, ls2, r1, r2
    del1: Delete "Delete Entities 1" | input = uni1(1) boundaries 20, 27
    fil1: Fillet | point = del1(1) points 11, 19; radius = rounding
    fil2: Fillet | point = fil1(1) points 21; radius = rounding_top
    del2: Delete "Delete Entities 2" | input = fil2(1) domains 1-8
    fin: Finalize "Form Union"

Materials
  mat1: Common "Air" on all domains
    def "Basic"
      thermalexpansioncoefficient = alpha_p(pA,T)
      molarmass = 0.02897[kg/mol]
      bulkviscosity = muB(T)
      relpermeability = 1
      relpermittivity = 1
      dynamicviscosity = eta(T)
      ratioofspecificheat = 1.4
      electricconductivity = 0[S/m]
      heatcapacity = Cp(T)
      density = rho(pA,T)
      thermalconductivity = k(T)
      soundspeed = cs(T)
      eta: Piecewise | arg = T; pieces = {200.0, 1600.0, -8.38278E-7+8.35717342E-8*T^1-7.69429583E-11*T^2+4.6437266E-14*T^3-1.06585607E-17*T^4}; argunit = K; fununit = Pa*s
      Cp: Piecewise | arg = T; pieces = {200.0, 1600.0, 1047.63657-0.372589265*T^1+9.45304214E-4*T^2-6.02409443E-7*T^3+1.2858961E-10*T^4}; argunit = K; fununit = J/(kg*K)
      rho: Analytic | expr = pA*0.02897/R_const[K*mol/J]/T; args = {pA, T}; dermethod = manual; argders = {{pA, d(pA*0.02897/R_const/T,pA)}, {T, d(pA*0.02897/R_const/T,T)}}; argunit = Pa,K; fununit = kg/m^3
      k: Piecewise | arg = T; pieces = {200.0, 1600.0, -0.00227583562+1.15480022E-4*T^1-7.90252856E-8*T^2+4.11702505E-11*T^3-7.43864331E-15*T^4}; argunit = K; fununit = W/(m*K)
      cs: Analytic | expr = sqrt(1.4*R_const[K*mol/J]/0.02897*T); args = T; dermethod = manual; argunit = K; fununit = m/s
      an1: Analytic | funcname = alpha_p; expr = -1/rho(pA,T)*d(rho(pA,T),T); args = {pA, T}; argunit = Pa,K; fununit = 1/K
      an2: Analytic "Analytic 2a" | funcname = muB; expr = 0.6*eta(T); args = T; argunit = K; fununit = Pa*s
    RefractiveIndex
      n = 1
      ki = 0
    NonlinearModel
      BA = (def.gamma+1)/2
  mat3: Common "Au (Gold) (Johnson and Christy 1972: n,k 0.188-1.937 µm)" on domains 1, 2, 5, 6
    RefractiveIndex
      n = n_interp(c_const/freq)
      ki = k_interp(c_const/freq)
      int1: Interpolation "Refractive index"
        funcname = n_interp
        table = 
          {1.879E-7, 1.28}
          {1.916E-7, 1.32}
          {1.953e-07, 1.34}
          {1.993E-7, 1.33}
          {2.033E-7, 1.33}
          {2.073E-7, 1.3}
          {2.119e-07, 1.3}
          {2.164E-7, 1.3}
          {2.214E-7, 1.3}
          {2.262E-7, 1.31}
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        interp = piecewisecubic
        argunit = m
        fununit = 1
      int2: Interpolation "Refractive index, imaginary part"
        funcname = k_interp
        table = 
          {1.879E-7, 1.188}
          {1.916E-7, 1.203}
          {1.953e-07, 1.226}
          {1.993E-7, 1.251}
          {2.033E-7, 1.277}
          {2.073E-7, 1.304}
          {2.119e-07, 1.35}
          {2.164E-7, 1.387}
          {2.214E-7, 1.427}
          {2.262E-7, 1.46}
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        interp = piecewisecubic
        argunit = m
        fununit = 1

Physics
  ewfd: ElectromagneticWavesFrequencyDomain on all domains
    dependent variable E = {Ex, Ey, Ez}
    BackgroundField.SolveFor = scatteredField
    BackgroundField.Eb = {E0*exp(1i*k0*y), 0, 0}
    wee1: WaveEquationElectric (default)
    pec1: PerfectElectricConductor (default)
    init1: init "Initial Values 1" (default)
    sctr1: Scattering "Scattering Boundary Condition 1" on boundaries 2, 10, 14, 21-25
    pmc1: PerfectMagneticConductor (disabled) on selection sel1

Mesh
  mesh1 "Mesh 1" (physics-controlled)
    size: MeshSizeDefault | hauto = 2

Studies
  std1 "Study Simple"
    wave: Wavelength "Wavelength Domain" | punit = nm; plist = 514[nm], 633[nm], 785[nm], 830[nm]
  std2 "Study Parametric"
    param: Parametric "Parametric Sweep"
      sweeptype = filled
      pname = center_width
      plistarr = range(1000[nm], 10[nm], 3000[nm])
      punit = m
    wave: Wavelength "Wavelength Domain" | punit = nm; plist = 514[nm], 633[nm], 785[nm], 830[nm]

Solver configurations
  sol1 "Solution 1" (study std1)
    v1: Variables "Dependent Variables 1"
    s1: Stationary "Stationary Solver 1" | stol = 0.01
      p1: Parametric | pname = lambda0; plistarr = 514[nm], 633[nm], 785[nm], 830[nm]; punit = nm; pcontinuationmode = no
      fc1: FullyCoupled
      d1: Direct "Suggested Direct Solver (ewfd)"
  sol2 "Solution 2" (study std2)
    // same settings as sol1
  sol3 "Parametric Solutions 1" (study std2)

Datasets
  dset1: Solution | solution = sol1
  dset2: Solution | solution = sol2
  dset3: Solution | solution = sol3
  mir1: Mirror2D | data = dset1; genpoints = {{0, -domain_height/2}, {0, domain_height/2}}

Derived values
  max1: MaxLine "Line Maximum 1" on boundaries 7, 11, 26, 27
    data = dset3
    expr = up(ewfd.normE)
    unit = V/m
    descr = Evaluate in domain on upside

Plots
  pg1: PlotGroup2D "Electric Field (ewfd)" | data = mir1
    surf1: Surface | expr = ewfd.normE
  pg2: PlotGroup2D "Electric Field (ewfd) 1" | data = dset3
    surf1: Surface | expr = ewfd.Ey

Exports
  anim3: Animation | target = player; sweeptype = dde; maxframes = 50; frametime = 0.001